ORIGIN := 1
i := 1 .. 6
j := 1 .. 6
A1[i, j] := 125/(4 + 0.25*0.2*i*j)
B[i] := 2
B = [2; 2; 2; 2; 2; 2]
A1 = [
    30.8642, 30.4878, 30.1205, 29.7619, 29.4118, 29.0698;
    30.4878, 29.7619, 29.0698, 28.4091, 27.7778, 27.1739;
    30.1205, 29.0698, 28.0899, 27.1739, 26.3158, 25.5102;
    29.7619, 28.4091, 27.1739, 26.0417, 25, 24.0385;
    29.4118, 27.7778, 26.3158, 25, 23.8095, 22.7273;
    29.0698, 27.1739, 25.5102, 24.0385, 22.7273, 21.5517
]
b[i, j] := 2
b[i, i] := 2.02
b[i, 6] = [2; 2; 2; 2; 2; 2.02]
b[i, 3] = [2; 2; 2.02; 2; 2; 2]
b[i, 4] = [2; 2; 2; 2.02; 2; 2]
b[i, 5] = [2; 2; 2; 2; 2.02; 2]
b[i, 1] = [2.02; 2; 2; 2; 2; 2]
b[i, 2] = [2; 2.02; 2; 2; 2; 2]
saveIsolve := lsolve(A1, b)
saveIsolve[i, 2] = [1510.97; -9402.01; 23153; -28233.3; 17063.9; -4092.49]
saveIsolve[i, 4] = [4639.52; -28232.4; 68087.1; -81419.5; 48314.8; -11389.5]
saveIsolve[i, 5] = [-2833.3; 17061.1; -40753.7; 48311.1; -28440.9; 6655.82]
saveIsolve[i, 1] = [-239.354; 1508.89; -3759.85; 4636.53; -2832.57; 686.42]
saveIsolve[i, 3] = [-3762.01; 23148.8; -56399.5; 68082; -40755.1; 9685.91]
saveIsolve[i, 6] = [687.167; -4093.82; 9688.82; -11391.7; 6657.31; -1547.69]
lsolve(A1, B) = [0.495867; -1.58065; 2.65689; -2.48648; 1.22958; -0.25121]
saveIsolve[i, 1] = [-239.354; 1508.89; -3759.85; 4636.53; -2832.57; 686.42]
C := [[-239.354]; [1.509*10^3]; [-3.76*10^3]; [4.637*10^3]; [-2.833*10^3]; [686.42]]
savePogreshnost[i] := |lsolve(A1, B) - saveIsolve[1, i]|/|lsolve(A1, B)|
([0.496; -1.581; 2.657; -2.486; 1.23; -0.251] - [-239.354; 1.509*10^3; -3.76*10^3; 4.637*10^3; -2.833*10^3; 686.42])/[0.496; -1.581; 2.657; -2.486; 1.23; -0.251] = [483.569; 955.459; 1416.13; 1866.25; 2304.25; 2735.74]
savePogreshnost[1] = 139.918
savePogreshnost[2] = 883.187
savePogreshnost[3] = 2198.98
savePogreshnost[4] = 2711.89
savePogreshnost[5] = 1656.14
